clear
package gpu 1 neigh hybrid newton on split 1
units metal
atom_style atomic
boundary p p p
processors 1 1 1
read_data /tmp/accelnet-other-descriptors/lammps/behler/empty.data
replicate 1 1 1
pair_style accelnet/gpu auto /tmp/accelnet-other-descriptors/lammps/behler-model/H.nn.ascii /tmp/accelnet-other-descriptors/lammps/behler-model/O.nn.ascii
pair_coeff * *
neighbor 0.6 bin
neigh_modify every 1 delay 0 check no
atom_modify sort 1 0.0
velocity all create 100 4928459 mom yes rot no dist gaussian

fix integrate all nve
timestep 0.0001
compute ea all pe/atom
compute vir all pressure NULL virial
thermo 1
thermo_style custom step pe c_vir[1] c_vir[2] c_vir[3] c_vir[4] c_vir[5] c_vir[6]
thermo_modify format float %.17g lost error
run 0
write_dump all custom initial.dump id type x y z fx fy fz c_ea modify sort id format float %.17g
run 20
write_dump all custom final.dump id type x y z fx fy fz c_ea modify sort id format float %.17g
