clear
units metal
boundary p p p
atom_style atomic
read_data ${data_file}
replicate ${rep_x} ${rep_y} ${rep_z}
mass 1 1.007825
mass 2 15.994915
if "${pair_name} == accelnet" then &
  "pair_style accelnet ${backend_name} ${model_1} ${model_2}" &
else &
  "pair_style aenet ${model_1} ${model_2}"
pair_coeff * *
thermo_style custom step pe
thermo ${measure_steps}
run ${warmup_steps} post no
run ${measure_steps} pre no
